bin_to_grey(c) :=
    N ← rows(c) - 1
    L ← cols(c) - 1
    for i ∈ 0 .. N
        g[i, 0] ← c[i, 0]
        for j ∈ 1 .. L
            g[i, j] ← 0 if (c[i, j - 1] xor c[i, j]) == 0
            g[i, j] ← 1 otherwise
    g
bin_to_grey([0, 0, 1, 1; 0, 1, 1, 0; 1, 0, 0, 1]) = [0, 0, 1, 0; 0, 1, 0, 1; 1, 1, 0, 1]
grey_to_bin(g) :=
    N ← rows(g) - 1
    L ← cols(g) - 1
    for i ∈ 0 .. N
        for j ∈ 0 .. L
            c[i, j] ← 0 if (sum(g[i, k], k = 0 .. j) == 0) or mod(sum(g[i, k], k = 0 .. j), 2) == 0
            c[i, j] ← 1 otherwise
    c
grey_to_bin([0, 0, 1, 0; 0, 1, 0, 1; 1, 1, 0, 1]) = [0, 0, 1, 1; 0, 1, 1, 0; 1, 0, 0, 1]
dec_to_bin(v) :=
    L ← rows(v) - 1
    N ← trunc(log(max(v), 2))
    for i ∈ 0 .. L
        for j ∈ 0 .. N
            c[i, j] ← trunc(mod(v[i]/2^(N - j), 2))
    c
dec_to_bin([4; 8; 10; 5]) = [0, 1, 0, 0; 1, 0, 0, 0; 1, 0, 1, 0; 0, 1, 0, 1]
dec_to_bin([8]) = [1, 0, 0, 0]
dec_to_bin([26]) = [1, 1, 0, 1, 0]
bin_to_dec(c) :=
    N ← rows(c)
    L ← cols(c)
    for i ∈ 0 .. N - 1
        v[i] ← sum(c[i, j]*2^(L - j - 1), j = 0 .. L - 1)
    v
grey_to_dec(c) :=
    c ← grey_to_bin(c)
    bin_to_dec(c)
dec_to_grey(c) :=
    c ← dec_to_bin(c)
    bin_to_grey(c)
dec_to_grey([4; 8; 10; 5]) = [0, 1, 1, 0; 1, 1, 0, 0; 1, 1, 1, 1; 0, 1, 1, 1]
bin_to_dec([0, 1, 0, 0; 1, 0, 0, 0; 1, 0, 1, 0; 0, 1, 0, 1]) = [4; 8; 10; 5]
grey_to_dec([0, 1, 1, 0; 1, 1, 0, 0; 1, 1, 1, 1; 0, 1, 1, 1]) = [4; 8; 10; 5]
real_to_bin(v, L, a, b) :=
    P ← 2^L - 1
    for i ∈ 0 .. rows(v) - 1
        c[i] ← round(P*(v[i] - a)/(b - a))
    dec_to_bin(c)
real_to_grey(v, L, a, b) :=
    P ← 2^L - 1
    for i ∈ 0 .. rows(v) - 1
        c[i] ← round(P*(v[i] - a)/(b - a))
    dec_to_grey(c)
real_to_bin([4.4; 8.2; 10.5; 5.9], 8, 2, 15) = [0, 0, 1, 0, 1, 1, 1, 1; 0, 1, 1, 1, 1, 0, 1, 0; 1, 0, 1, 0, 0, 1, 1, 1; 0, 1, 0, 0, 1, 1, 0, 1]
real_to_grey([4.4; 8.102; 10.5; 5.9], 8, 2, 15) = [0, 0, 1, 1, 1, 0, 0, 0; 0, 1, 0, 0, 0, 1, 0, 0; 1, 1, 1, 1, 0, 1, 0, 0; 0, 1, 1, 0, 1, 0, 1, 1]
bin_to_real(c, a, b) :=
    L ← cols(c)
    P ← 2^L - 1
    v ← bin_to_dec(c)
    for i ∈ 0 .. rows(c) - 1
        r[i] ← a + v[i]*(b - a)/P
    r
bin_to_real([0, 0, 1, 0, 1, 1, 1, 1; 0, 1, 1, 1, 1, 0, 1, 0; 1, 0, 1, 0, 0, 1, 1, 1; 0, 1, 0, 0, 1, 1, 0, 1], 2, 15) = [4.39608; 8.21961; 10.5137; 5.92549]
grey_to_real(c, a, b) :=
    L ← cols(c)
    P ← 2^L - 1
    v ← grey_to_dec(c)
    for i ∈ 0 .. rows(c) - 1
        r[i] ← a + v[i]*(b - a)/P
    r
grey_to_real([0, 0, 1, 1, 1, 0, 0, 0; 0, 1, 0, 0, 0, 1, 0, 0; 1, 1, 1, 1, 0, 1, 0, 0; 0, 1, 1, 0, 1, 0, 1, 1], 2, 15) = [4.39608; 8.11765; 10.5137; 5.92549]
gen_real(borders) :=
    N ← rows(borders) - 1
    for i ∈ 0 .. N
        v[i] ← borders[i, 0] + rnd(1)*(borders[i, 1] - borders[i, 0])
    v
gen_real([0, 100; 0, 1000; 2, 3; 4, 4.1]) = [9.14113; 147.313; 2.98851; 4.01191]
