ORIGIN := 1
a := -7
b := 7
L := 16
K := 100
f(x) := x^4 - 10*x^3 + 36*x^2 + 5*x
# длина хромосомы
# Входные параметры:
#
# a, b - границы интервала
# L - длина хромосомы
# K - количество особей
# Формирование начальной популяции | количество особей
ss0(a, b, L, K) :=
    for j ∈ 1 .. K
        z[j] ← round(rnd(10)/10)
        z[j] ← 0 if a ≥ 0
        z[j] ← 1 if b ≤ 0
    k1 ← 1 if a ≥ 0
    k1 ← -1 if a < 0 or b ≤ 0
    for j ∈ 1 .. K
        for i ∈ 1 .. L
            c0[j, i] ← k1^z[j]*round(rnd(10)/10)
    c0
c0 := ss0(a, b, L, K)
# Выходной параметр
#
# с0 - массив особей
# начальной популяции
c0 =  # no stored result
# Расчет фенотипов (декодирование)
cod2_10(c, a, b) :=
    K ← rows(c)
    L ← cols(c)
    for j ∈ 1 .. K
        v1[j] ← sum(c[j, k]*2^(L - k), k = 1 .. L)
    if a ≥ 0
        r ← (2^L - 1)/(b - a)
        for j ∈ 1 .. K
            v[j] ← v1[j]/r + a
    if b ≤ 0
        r ← (2^L - 1)/(b - a)
        for j ∈ 1 .. K
            v[j] ← v1[j]/r + b
    if a < 0 and b > 0
        r1 ← (2^L - 1)/|a|
        r2 ← (2^L - 1)/|b|
        for j ∈ 1 .. K
            v[j] ← v1[j]/r1 if v1[j] ≤ 0
            v[j] ← v1[j]/r2 if v1[j] ≥ 0
    v
# Входные параметры:
#
# a, b - границы интервала
# с - массив двоичных чисел
# Выходной параметр
#
# v - массив десятичных чисел
x0 := cod2_10(c0, a, b)
mean(f(x0)) = 997.273
x0 = [
    3.28664; 6.71972; -3.76132; 2.8878; -5.93646; 0.771298; -3.79091; 4.72445; 4.66282; 1.75996
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]
f(x0) = [
    166.966; 663.842; 1222.79; 143.378; 4573.09; 21.0384; 1249.71; 270.842; 264.947; 75.3886
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]
# Расчет веса
weight(x, K) :=
    sum ← sum(|f(x[i])|, i = 1 .. K)
    for s ∈ 1 .. K
        W[s] ← |f(x[s])|/sum
    W
w := weight(x0, K)
# Поиск вероятности
p1(w, K) :=
    for i ∈ 1 .. K
        p[i] ← 1/(0.1 + w[i])/sum(1/(0.1 + w[j]), j = 1 .. K)*100
    p
w = [
    0.00167422; 0.00665655; 0.0122613; 0.00143769; 0.0458557; 0.000210958; 0.0125313; 0.00271581; 0.0026567; 0.000755944
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]
p := p1(w, K)
# Выбор родителей с помощью рулетки
n := 2000
# Входные параметры:
#
# p - массив вероятностей
p = [
    1.06484; 1.0151; 0.964421; 1.06733; 0.742289; 1.08039; 0.962107; 1.05405; 1.05465; 1.07455
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]
ruletka(w) :=
    n ← rows(w)
    for j ∈ 1 .. n
        k[j] ← j
    for j ∈ 1 .. n
        r[j] ← round(rnd(100))
    for j ∈ 1 .. n
        for i ∈ 1 .. n
            if r[j] ≥ sum(w[m], m = 1 .. i)
                k[j] ← i
                continue
    k
# Выходной параметр
#
# к - номера выбранных
# особей родителей
k := ruletka(p)
k = [
    14; 5; 26; 3; 79; 97; 83; 94; 37; 10
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]
# Выбор особей для скрещивания
vibor(kr, c0, a, b) :=
    n ← rows(kr)
    L ← cols(c0)
    for j ∈ 1 .. n
        for i ∈ 1 .. L
            c1[j, i] ← c0[kr[j], i]
    v ← cod2_10(c1, a, b)
    ff ← f(v)
    a ← sort(ff)
    for j ∈ 1 .. n
        for i ∈ 1 .. n
            k1[i] ← kr[j] if ff[j] == a[i]
    r ← 0
    for j ∈ 1 .. n/2
        for i ∈ 1 .. L
            cr[j + r, i] ← c0[k1[j], i]
            cr[j + 1 + r, i] ← c0[k1[j + 1], i]
        r ← r + 1
    cr
# Входные параметры
# kr - массив номеров особей для скрещивания
# с0 - массив особей для скрещивания в двоичном коде
# a,b - границы интервала
#
# Выходной параметр
# сr -  массив выбранных особей-родителей
cr := vibor(k, c0, a, b)
xr := vibor(k, x0, a, b)
cr =  # no stored result
xr = [
    -0.0384527; 0.261372; 0.261372; 0.31809; 0.31809; 0.31809; 0.31809; 0.378332; 0.378332; 0.378332
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]
Скрещивание
# Входные параметры
# cr - массив особей для скрещивания в двоичном коде
#
# Выходной параметр
# сs -  массив особей потомков
cros(cr) :=
    n ← rows(cr)
    L ← cols(cr)
    for j ∈ 1 .. n
        k[j] ← 1 if sum(cr[j, i], i = 1 .. L) ≥ 0
        k[j] ← -1 otherwise
    for j ∈ 1 .. n
        for i ∈ 1 .. L
            cs[j, i] ← cr[j, i]
    for j ∈ 1 .. n/2
        rs[j] ← round(rnd(L))
        rs[j] ← 1 if rs[j] == 0
    r ← 0
    for j ∈ 1 .. n/2
        cs[j + r, rs[j]] ← cr[j + 1 + r, rs[j]]
        cs[j + 1 + r, rs[j]] ← cr[j + r, rs[j]]
        if k[j + r]*k[j + 1 + r] == -1
            cs[j + r, rs[j]] ← 0
            cs[j + 1 + r, rs[j]] ← 0
        r ← r + 1
    cs
cp := cros(cr)
xp := cros(xr)
mean(f(xp)) = 129.237
cp =  # no stored result
xp = [
    0; 0; 0.31809; 0.261372; 0.31809; 0.31809; 0.378332; 0.31809; 0.378332; 0.378332
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]
Мутация
# Входной параметр
# с - массив особей для мутации в двоичном коде
#
# Выходной параметр
# с1 - массив мутированных особей
mut(c) :=
    n ← rows(c)
    L ← cols(c)
    for j ∈ 1 .. n
        for i ∈ 1 .. L
            c1[j, i] ← c[j, i]
    for j ∈ 1 .. n
        k1[j] ← 1 if sum(c[j, i], i = 1 .. L) ≥ 0
        k1[j] ← -1 otherwise
    p ← 1/L
    for j ∈ 1 .. n
        x ← rnd(1)
        if x < p
            k ← trunc(rnd(L)) + 1
            c1[j, k] ← 0 if c[j, k] == 1 or c[j, k] == -1
            (c1[j, k] == k1[j]) otherwise
    c1
cm := mut(cp)
xm := mut(xp)
mean(f(xm)) = 129.237
cm =  # no stored result
xm = [
    0; 0; 0.31809; 0.261372; 0.31809; 0.31809; 0.378332; 0.31809; 0.378332; 0.378332
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]
elitarvibor(cr, cm, a, b) :=
    n ← rows(cr)
    L ← cols(cr)
    vr ← cod2_10(cr, a, b)
    ffr ← f(vr)
    ar ← sort(ffr)
    for j ∈ 1 .. n
        for i ∈ 1 .. n
            kr[i] ← j if ffr[j] == ar[i]
    vm ← cod2_10(cm, a, b)
    ffm ← f(vm)
    am ← sort(ffm)
    for j ∈ 1 .. n
        for i ∈ 1 .. n
            km[i] ← j if ffm[j] == am[i]
    for j ∈ 1 .. n/2
        for i ∈ 1 .. L
            cn[j, i] ← cr[kr[j], i]
            cn[j + n/2, i] ← cm[km[j], i]
    cn
# Входные параметры
# сr - массив выбранных особей-родителей
# cm - массив особей после мутации()особи потомки
# a,b - границы интервалов
#
# Выходной параметр
# cn - массив выбранных особей, составленный из лучших особей-родителей и лучших особей потомков
xn := elitarvibor(xr, cm, a, b)
cn := elitarvibor(cr, cm, a, b)
mean(f(xn)) = 13.1025
cn =  # no stored result
xn = [
    -0.0384527; 0.261372; 0.261372; 0.31809; 0.31809; 0.31809; 0.31809; 0.378332; 0.378332; 0.378332
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]
f(xn) = [
    -0.138463; 3.59232; 3.59232; 4.92135; 4.92135; 4.92135; 4.92135; 6.52349; 6.52349; 6.52349
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]
result(a, b, K, L, N, e) :=
    c0 ← ss0(a, b, L, K)
    x0 ← cod2_10(c0, a, b)
    x1 ← f(x0)
    sr_znac ← mean(x1)
    for i ∈ 1 .. N
        W ← weight(x1, K)
        P ← p1(W, K)
        k ← ruletka(P)
        cr ← vibor(k, c0, a, b)
        cp ← cros(cr)
        cm ← mut(cp)
        cn ← elitarvibor(cr, cm, a, b)
        x0 ← cod2_10(cn, a, b)
        x1 ← f(x0)
        sr_znac2 ← mean(x1)
        break if ((sr_znac - sr_znac2) < e)
        sr_znac ← sr_znac2
    cn
N := 2000
ε := 0.00001
res := result(a, b, K, L, N, ε)
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params := cod2_10(res, a, b)
min(f(params)) = 0.143289
params = [
    -0.180194; -0.180194; -0.180194; 0.0906844; 0.0906844; 0.0906844; 0.0906844; 0.0906844; 0.0906844; -0.388373
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]
x := 1
mean(cod2_10(res, a, b)) = -0.0498572
mean(f(mean(cod2_10(res, a, b)))) = -0.158554
f(params) = [
    0.327507; 0.327507; 0.327507; 0.742083; 0.742083; 0.742083; 0.742083; 0.742083; 0.742083; 4.09668
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]
Minimize(f, x) = -0.0675274
f(Minimize(f, x)) = -0.170379
